<neuroml xmlns="http://www.neuroml.org/schema/neuroml2"  xmlns:xs="http://www.w3.org/2001/XMLSchema" xmlns:xsi="http://www.w3.org/2001/XMLSchema-instance" xsi:schemaLocation="http://www.neuroml.org/schema/neuroml2 https://raw.github.com/NeuroML/NeuroML2/development/Schemas/NeuroML2/NeuroML_v2beta4.xsd" id="Cerebellum3DDemo">
    <include href="Granule_98.cell.nml"></include>
    <include href="Golgi_98.cell.nml"></include>
    <include href="AMPA_GranGol.synapse.nml"></include>
    <include href="GABAA.synapse.nml"></include>
    <network id="Cerebellum3DDemo">
        <population id="Grcs" component="Granule_98" type="populationList" size="40">
            <instance id="0">
                <location y="94.489311573400002" x="802.307844520000003" z="420.380021517999978"/>
            </instance>
            <instance id="1">
                <location y="19.681361495099999" x="951.207274238999958" z="890.350717247000034"/>
            </instance>
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        </population>
        <population id="Golgis" component="Golgi_98" type="populationList" size="20">
            <instance id="0">
                <location y="97.177357713899994" x="152.486814750000008" z="683.957414444000051"/>
            </instance>
            <instance id="1">
                <location y="85.888780458400007" x="127.976549234999993" z="993.750502943000015"/>
            </instance>
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        </population>
        <projection id="net_conn_grc_gol" postsynapticPopulation="Golgis" presynapticPopulation="Grcs" synapse="AMPA_GranGol">
            <connection id="0" preFractionAlong="0.5" preCellId="../Grcs/0/Granule_98" postFractionAlong="0.5" postSegmentId="0" postCellId="../Golgis/6/Golgi_98" preSegmentId="0"/>
            <connection id="1" preFractionAlong="0.5" preCellId="../Grcs/0/Granule_98" postFractionAlong="0.5" postSegmentId="0" postCellId="../Golgis/9/Golgi_98" preSegmentId="0"/>
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        </projection>
        <projection id="net_conn_gol_grc" postsynapticPopulation="Grcs" presynapticPopulation="Golgis" synapse="GABAA">
            <connection id="0" preFractionAlong="0.5" preCellId="../Golgis/3/Golgi_98" postFractionAlong="0.5" postSegmentId="0" postCellId="../Grcs/0/Granule_98" preSegmentId="0"/>
            <connection id="1" preFractionAlong="0.5" preCellId="../Golgis/6/Golgi_98" postFractionAlong="0.5" postSegmentId="0" postCellId="../Grcs/0/Granule_98" preSegmentId="0"/>
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        </projection>
    </network>
</neuroml>
